pF := F*10^-12
# microstrip line
C_MSL := [128.5, -12.0; -12.0, 128.5]*pF/m
nH := H*10^-9
L_MSL := [283.4, 52.2; 52.2, 283.4]*nH/m
# side by side stripline
C_SSL := [153.5, -21.8; -21.8, 153.5]*pF/m
L_SSL := [318.5, -53.5; -53.5, 318.5]*nH/m
# broadside stripline
C_BSL := [167.5, -53.5; -53.5, 167.5]*pF/m
L_BSL := [318, 101.4; 101.4, 318]*nH/m
# Q1
CpinQ1 := 0.13*pF
LpinQ1 := 1.3*nH
RpinQ1 := 0.1 Ω
